f(x, y) := -y*ln(y)/x
x0 := 1
y0 := e
xend := 2.6
h := 0.1
N1 := 2*|xend - x0|/h
N2 := |xend - x0|/(2*h)
N := |xend - x0|/h
Y := rkfixed(y0, x0, xend, N, f) = [
    1, 2.71828;
    1.1, 2.48207;
    1.2, 2.30098;
    1.3, 2.15811;
    1.4, 2.04273;
    1.5, 1.94773;
    1.6, 1.86825;
    1.7, 1.80081;
    1.8, 1.74291;
    1.9, 1.69269;
    2, 1.64872;
    2.1, 1.60993;
    2.2, 1.57546;
    2.3, 1.54463;
    2.4, 1.5169;
    2.5, 1.49183;
    2.6, 1.46905
]
Y1 := rkfixed(y0, x0, xend, N1, f) = [
    1, 2.71828;
    1.05, 2.59187;
    1.1, 2.48207;
    1.15, 2.38587;
    1.2, 2.30098;
    1.25, 2.22554;
    1.3, 2.15811;
    1.35, 2.09749;
    1.4, 2.04273;
    1.45, 1.99303
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]
Y2 := rkfixed(y0, x0, xend, N2, f) = [
    1, 2.71828;
    1.2, 2.30098;
    1.4, 2.04273;
    1.6, 1.86825;
    1.8, 1.74291;
    2, 1.64873;
    2.2, 1.57546;
    2.4, 1.5169;
    2.6, 1.46905
]
i := 0 .. N
i1 := 0 .. N1
i2 := 0 .. N2
# [plot: Y[i, 1], Y1[i1, 1], Y2[i2, 1] vs Y[i, 0], Y1[i1, 0], Y2[i2, 0]]
