f1(x, y) := atan(x*x + y*y)
x0 := 0
y10 := 0.5
xend := 2
f2(x, y) := sin(x + y)
y20 := 1.5
h := 0.1
N := |xend - x0|/h
N1 := 2*|xend - x0|/h
N2 := |xend - x0|/(2*h)
Y := rkfixed(y10, x0, xend, N, f1) = [
    0, 0.5;
    0.1, 0.526021;
    0.2, 0.556612;
    0.3, 0.594098;
    0.4, 0.640712;
    0.5, 0.698313;
    0.6, 0.768058;
    0.7, 0.850167;
    0.8, 0.943953;
    0.9, 1.04811;
    1, 1.16105;
    1.1, 1.28125;
    1.2, 1.40734;
    1.3, 1.53819;
    1.4, 1.67288;
    1.5, 1.81071;
    1.6, 1.95109;
    1.7, 2.09357;
    1.8, 2.23781;
    1.9, 2.38352;
    2, 2.53046
]
Y1 := rkfixed(y10, x0, xend, N1, f1) = [
    0, 0.5;
    0.05, 0.512583;
    0.1, 0.526021;
    0.15, 0.5406;
    0.2, 0.556612;
    0.25, 0.574349;
    0.3, 0.594098;
    0.35, 0.616135;
    0.4, 0.640712;
    0.45, 0.668047
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]
Y2 := rkfixed(y10, x0, xend, N2, f1) = [
    0, 0.5;
    0.2, 0.556612;
    0.4, 0.64071;
    0.6, 0.768055;
    0.8, 0.94395;
    1, 1.16105;
    1.2, 1.40733;
    1.4, 1.67287;
    1.6, 1.95108;
    1.8, 2.2378;
    2, 2.53045
]
Y3 := rkfixed(y20, x0, xend, N, f2) = [
    0, 1.5;
    0.1, 1.59979;
    0.2, 1.69705;
    0.3, 1.78812;
    0.4, 1.87002;
    0.5, 1.94063;
    0.6, 1.99874;
    0.7, 2.04392;
    0.8, 2.07634;
    0.9, 2.0966;
    1, 2.10554;
    1.1, 2.10414;
    1.2, 2.09337;
    1.3, 2.07421;
    1.4, 2.04755;
    1.5, 2.01423;
    1.6, 1.97497;
    1.7, 1.93045;
    1.8, 1.88123;
    1.9, 1.82784;
    2, 1.77072
]
Y4 := rkfixed(y20, x0, xend, N1, f2) = [
    0, 1.5;
    0.05, 1.54997;
    0.1, 1.59979;
    0.15, 1.64898;
    0.2, 1.69705;
    0.25, 1.74356;
    0.3, 1.78812;
    0.35, 1.83037;
    0.4, 1.87002;
    0.45, 1.90683
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]
Y5 := rkfixed(y20, x0, xend, N2, f2) = [
    0, 1.5;
    0.2, 1.69704;
    0.4, 1.87001;
    0.6, 1.99873;
    0.8, 2.07632;
    1, 2.10553;
    1.2, 2.09336;
    1.4, 2.04754;
    1.6, 1.97496;
    1.8, 1.88122;
    2, 1.77071
]
i := 0 .. N
i1 := 0 .. N1
i2 := 0 .. N2
# [plot: Y[i, 1], Y1[i1, 1], Y2[i2, 1], Y3[i, 1], Y4[i1, 1], Y5[i2, 1] vs Y[i, 0], Y1[i1, 0], Y2[i2, 0], Y3[i, 0], Y4[i1, 0], Y5[i2, 0]]
