a1 := -4
a2 := 4
y'' := -a1*y' - a2*y  # error: Эта переменная не определена. Проверьте правильность установки обозначения.
Y := [0; 1]
[y(0); y`(0)] == [y0; y1] == [0; 1]
y1 := 1
y0 := 0
D(t, y) := [-y1; -a1*y1 - a2*y0]
Z := rkfixed(Y, 0, 5, 100, D) = [
    0, 0, 1;
    0.05, -0.05, 1.2;
    0.1, -0.1, 1.4;
    0.15, -0.15, 1.6;
    0.2, -0.2, 1.8;
    0.25, -0.25, 2;
    0.3, -0.3, 2.2;
    0.35, -0.35, 2.4;
    0.4, -0.4, 2.6;
    0.45, -0.45, 2.8
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]
i := 0 .. 100
# [plot: Z[i, 1] vs Z[i, 0]]
